/CLEAR
prefix='Body1'
PI=ACOS(-1)

h=50
L=100
r=20
F=100


E=71.7E9
V=0.29
!E=1.00E9

RHO=2710


NMESH=1
!NCNM=50

/PREP7
ET,1,PLANE183
UIMP,1,EX,NUXY,DENS,E,V,RHO

RECTING,-L,0,0,h
CYL4,0,0,20
ASBA,1,2,,,DELETE
MSHKEY,2
MSHAPE,0

!ESIZE,r/5
!ESIZE,r/10
ESIZE,r/15
!ESIZE,r/20

ALLS
AMESH,ALL

!!!!!!!!!!!!!!!!!!!!!!!!!!!!!!!!!!!!!!!!!!!!!!!!!!!!!!
 ! How to read in MATLAB

!NLIST5=readtable('NLIST5.csv');
!ELIST5=readtable('ELIST5.csv');
% t2=readtable('SOLYBIMOMENTL19.csv');
!NLIST5.X,
