/CLEAR
prefix='Body1'
PI=ACOS(-1)

h=50
L=100
r=20
F=100


E=71.7E9
V=0.29
!E=1.00E9

RHO=2710


NMESH=1
!NCNM=50

/PREP7
ET,1,PLANE182
UIMP,1,EX,NUXY,DENS,E,V,RHO

RECTING,-L,0,0,h
CYL4,0,0,20
ASBA,1,2,,,DELETE
MSHKEY,2
MSHAPE,0

ESIZE,r/5
!ESIZE,r/10
!ESIZE,r/15
!ESIZE,r/20

ALLS
AMESH,ALL

!!!!!!!!!!!!!!!!!!!!!!!!!!!!!!!!!!!!!!!!!!!!!!!!!!!!!!
 ! How to read in MATLAB

NLIST5=readtable('NLIST5PLANE182.csv');
ELIST5=readtable('ELIST5PLANE182.csv');
NLIST10=readtable('NLIST10.csv');
ELIST10=readtable('ELIST10.csv');
NLIST15=readtable('NLIST15.csv');
ELIST15=readtable('ELIST15.csv');
NLIST20=readtable('NLIST20.csv');
ELIST20=readtable('ELIST20.csv');
X=NLIST15.X;
Y=NLIST15.Y;
Z=NLIST15.Z;
X = X(~isnan(X));
Y = Y(~isnan(Y));
Z = Z(~isnan(Z));
!nloc5=[ELIST5.var1; ELIST5.var; ELIST5.var3; ELIST5.var4; ELIST5.var5; ELIST5.var6; ELIST5.var7; ELIST5.var8 ];
nloc5PLANE182=[ELIST5PLANE182.var1; ELIST5PLANE182.var; ELIST5PLANE182.var3; ELIST5PLANE182.var4];
